<?xml version="1.0"?>
<!-- Rotax 912 ULS -->

<piston_engine name="Rotax912ULS">
  <minmp unit="INHG">         11.0 </minmp>
  <maxmp unit="INHG">         29.92 </maxmp>
  <displacement unit="IN3"> 82.6 </displacement>
  <maxhp>        100.00 </maxhp>
  <cycles>         4.0 </cycles>
  <idlerpm>      1400.0 </idlerpm>
  <maxrpm>      5800.0 </maxrpm>
  <sparkfaildrop>  0.1 </sparkfaildrop>
  <volumetric-efficiency> 0.94 </volumetric-efficiency>
  <man-press-lag> 0.1 </man-press-lag>
  <static-friction unit="HP"> 2.00 </static-friction>
  <starter-torque> 120.00 </starter-torque>
  <starter-rpm> 1400 </starter-rpm>

  <stroke unit="IN">  2.4 </stroke>
  <bore unit="IN">    3.31 </bore>
  <cylinders>         4.0  </cylinders>
  <compression-ratio>  10.5 </compression-ratio>

  <!-- Heating and cooling is done in rotax-thermal.xml -->
  <cylinder-head-mass unit="LBS"> 13.0 </cylinder-head-mass>
  <cooling-factor> 1 </cooling-factor>
  <oil-cooling-factor> 1 </oil-cooling-factor>
</piston_engine>
